**
** PARTS
**
*Part, name = Dummy
*End Part
**
*PART, NAME=BeamCCW0_0OUT
*NODE, NSET=BeamCCW0_0OUT
1, 1.5, -6.204693213306434e-13, 0.0
2, 1.3736748430288228, 0.6115994444024969, 0.41887902047866665
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*ELEMENT, type=B31, ELSET=BeamCCW0_0OUT
1, 1, 2
2, 2, 3
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** Section: BeamCCW0_0OUT  Profile:BeamCCW0_0OUT
*Beam Section,  elset=BeamCCW0_0OUT, material=FiberMat, temperature=GRADIENTS, section=CIRC
0.038250000000000006
0.,0.,-1
*END PART
**
*PART, NAME=BeamCW0_0OUT
*NODE, NSET=BeamCW0_0OUT
16, 1.585, -6.556292495393797e-13, 0.0
17, 1.4446128937985534, -0.6431830994864536, 0.41887902047866665
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*ELEMENT, type=B31, ELSET=BeamCW0_0OUT
1, 16, 17
2, 17, 18
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** Section: BeamCW0_0OUT  Profile:BeamCW0_0OUT
*Beam Section,  elset=BeamCW0_0OUT, material=FiberMat, temperature=GRADIENTS, section=CIRC
0.038250000000000006
0.,0.,-1
*END PART
**
**
*Part, name=MiddleBar
*Surface, type=CYLINDER, name=MiddleBar-Surface
START, -0.79375, 0.79375
 LINE, -0.79375, -0.79375
 LINE, 0.79375, -0.79375
 LINE, 0.79375, 0.79375
 LINE, -0.79375, 0.79375
*Node
1, 0., 0., 0.
*Nset,nset=MiddleBar-RefPt_, internal
1,
*Nset, nset=set-RefPtMiddleBar, internal
1,
*End Part
**
**
** ASSEMBLY
**
*Assembly, name=Assembly
**
*Instance, name = DummyInstance, part  = dummy
*End Instance
*Node
      2,           0.,           0.,           0.
*Nset, nset=DummySet, internal
2,
*Nset, nset=DummySet
2,
**
*Instance, name=BeamCCW0_0OUT,part=BeamCCW0_0OUT
*End Instance
**
*Instance, name=BeamCW0_0OUT,part=BeamCW0_0OUT
*End Instance
**
*Instance, name=MiddleBar, part=MiddleBar
0, 0, 3.14159265359
0, 0, 3.14159265359, 1, 0, 3.14159265359, 0.0
0, 0, 3.14159265359, 0, 1, 3.14159265359, 0.0
0, 0, 3.14159265359, 0, 0, 4.14159265359, 0.0
*Rigid Body, ref node=MiddleBar-RefPt_, analytical surface=MiddleBar-Surface
*Element, type=MASS, elset=Set-RefPtMiddleBar_MiddleBarIntertia_MASS_
1, 1
*Mass, elset=Set-RefPtMiddleBar_MiddleBarIntertia_MASS_
10.,
*Element, type=ROTARYI, elset=Set-RefPtMiddleBar_MiddleBarIntertia_ROTI_
2, 1
*Rotary Inertia, elset=Set-RefPtMiddleBar_MiddleBarIntertia_ROTI_
0.001, 0.001, 0.001, 0.0, 0.0, 0.0
*End Instance
**
**
*Nset, nset=m_BeamCCW0_0_OUT_PBC, instance=BeamCCW0_0OUT
 1,
*Nset, nset=s_BeamCCW0_0_OUT_PBC, instance=BeamCCW0_0OUT
 16,
*Surface, type=NODE, name =BeamCCW0_0_OUT_CNS, internal
s_BeamCCW0_0_OUT_PBC, 1
**
*Nset, nset=m_BeamCW0_0_OUT_PBC, instance=BeamCW0_0OUT
 16,
*Nset, nset=s_BeamCW0_0_OUT_PBC, instance=BeamCW0_0OUT
 31,
*Surface, type=NODE, name =BeamCW0_0_OUT_CNS, internal
s_BeamCW0_0_OUT_PBC, 1
** Constraint: PBC_OUT_BeamCCW0_0_1
*Equation
3
M_BeamCCW0_0_OUT_PBC,1,-1.
S_BeamCCW0_0_OUT_PBC,1,1.
DUMMYSET,1,1
** Constraint: PBC_OUT_BeamCCW0_0_2
*Equation
3
M_BeamCCW0_0_OUT_PBC,2,-1.
S_BeamCCW0_0_OUT_PBC,2,1.
DUMMYSET,2,1
** Constraint: PBC_OUT_BeamCCW0_0_3
*Equation
3
M_BeamCCW0_0_OUT_PBC,3,-1.
S_BeamCCW0_0_OUT_PBC,3,1.
DUMMYSET,3,1
** Constraint: PBC_OUT_BeamCCW0_0_4
*Equation
3
M_BeamCCW0_0_OUT_PBC,4,-1.
S_BeamCCW0_0_OUT_PBC,4,1.
DUMMYSET,4,1
** Constraint: PBC_OUT_BeamCCW0_0_5
*Equation
3
M_BeamCCW0_0_OUT_PBC,5,-1.
S_BeamCCW0_0_OUT_PBC,5,1.
DUMMYSET,5,1
** Constraint: PBC_OUT_BeamCCW0_0_6
*Equation
3
M_BeamCCW0_0_OUT_PBC,6,-1.
S_BeamCCW0_0_OUT_PBC,6,1.
DUMMYSET,6,1
** Constraint: PBC_OUT_BeamCW0_0_1
*Equation
3
M_BeamCW0_0_OUT_PBC,1,-1.
S_BeamCW0_0_OUT_PBC,1,1.
DUMMYSET,1,1
** Constraint: PBC_OUT_BeamCW0_0_2
*Equation
3
M_BeamCW0_0_OUT_PBC,2,-1.
S_BeamCW0_0_OUT_PBC,2,1.
DUMMYSET,2,1
** Constraint: PBC_OUT_BeamCW0_0_3
*Equation
3
M_BeamCW0_0_OUT_PBC,3,-1.
S_BeamCW0_0_OUT_PBC,3,1.
DUMMYSET,3,1
** Constraint: PBC_OUT_BeamCW0_0_4
*Equation
3
M_BeamCW0_0_OUT_PBC,4,-1.
S_BeamCW0_0_OUT_PBC,4,1.
DUMMYSET,4,1
** Constraint: PBC_OUT_BeamCW0_0_5
*Equation
3
M_BeamCW0_0_OUT_PBC,5,-1.
S_BeamCW0_0_OUT_PBC,5,1.
DUMMYSET,5,1
** Constraint: PBC_OUT_BeamCW0_0_6
*Equation
3
M_BeamCW0_0_OUT_PBC,6,-1.
S_BeamCW0_0_OUT_PBC,6,1.
DUMMYSET,6,1
*Element, type=MASS, elset=DUMMYSET
1, 2
*Mass, elset=DUMMYSET
1e-05,
*End Assembly
**
** MATERIALS
**
*Material, name=FiberMat
*Density
 3.21,
*Elastic
420000., 0.3
**
*Nset, nset=BCSet, instance=BeamCCW0_0OUT
1
*Nset, nset=ForceSet, instance=BeamCCW0_0OUT
16
*Nset, nset=BCSet, instance=BeamCW0_0OUT
16
*Nset, nset=ForceSet, instance=BeamCW0_0OUT
31
*Amplitude, name=Amp-1, definition=SMOOTH STEP
             0.,              0.,              1.,              1.
**
** INTERACTION PROPERTIES
**
*Surface Interaction, name=IntProp-1
*Friction
 0.16,
** ----------------------------------------------------------------
**
*Step, name=Step-1, nlgeom=YES
*Dynamic, Explicit
, 1.
*Bulk Viscosity
0.06, 1.2
**
** BOUNDARY CONDITIONS
**
** Name: BC-1 Type: Displacement/Rotation
*Boundary, amplitude=Amp-1
DUMMYSET, 1, 1
DUMMYSET, 2, 2
DUMMYSET, 4, 4
DUMMYSET, 5, 5
DUMMYSET, 6, 6
**
** LOADS
**
** Name: Load-1   Type: Concentrated force
*Cload, amplitude=AMP-1
DUMMYSET, 3, -10
**
** INTERACTIONS
**
** Interaction: general_contact
*Contact, op=NEW
*Contact Inclusions, ALL EXTERIOR
*Contact Property Assignment
 ,  , INTPROP-1
**
